// COMSOL Multiphysics 5.5.0.292 model "All_placas_volataje_AC_copy.mph"
// Outline of the model tree

Parameters
  R = 12 [cm]  // Radius of the cylinder
  d = 0.4[cm]  // Distance betwen the plates
  L = 2*sqrt(R^2-d^2)  // Length of the plates
  q = e_const  // Charge of the particles
  m = mp_const  // Mass of the protons
  B = 0.1 [T]  // Intensity of Normal magnetic field
  w = 2*q*B/m  // Angular frecuency of AC voltage
  A = 10[V]  // Amplitude of the voltage

Functions
  wv1: Wave "Waveform 1" | freq = w; amplitude = A

Geometry
  geom1 "Geometry 1" (3D, length unit cm)
    cyl1: Cylinder | pos = {0, 0, -2}; r = R+0.1; h = 4
    blk1: Block | pos = {-d, -L/2, -2}; size = {0.2, L, 4}
    blk2: Block | pos = {d, -L/2, -2}; size = {0.2, L, 4}
    fin: Finalize "Form Union"
  pgeom_cpt "Geometry" (1D, length unit m)
    pt1: Point
  pgeom_cpt2 "Geometry 2" (1D, length unit m)
    pt1: Point

Physics
  es: Electrostatics on all domains
    dependent variable V
    ccn1: ChargeConservation (default)
    zc1: ZeroCharge (default)
    init1: init "Initial Values 1" (default)
  cpt: ChargedParticleTracing on all domains
    dependent variable q = {qx, qy, qz}
    wall1: Wall (default)
    pp1: ParticleProperties
      SpecifyHamiltonian = Directly
      ParticleSpecies = UserDefined
      mp = me_const
      mprest = me_const
      Z = -1
  es2: Electrostatics on all domains
    dependent variable V2
    ccn1: ChargeConservation (default)
    zc1: ZeroCharge (default)
    init1: init "Initial Values 1" (default)
  cpt2: ChargedParticleTracing on all domains
    dependent variable q2 = {q2x, q2y, q2z}
    RelativisticCorrection.RelativisticCorrection = 0
    ParticleReleaseSpecification.ParticleReleaseSpecification = SpecifyCurrent
    wall1: Wall (default)
    pp1: ParticleProperties
      SpecifyHamiltonian = Directly
      ParticleSpecies = UserDefined
      mp = me_const
      mprest = me_const
      Z = -1
    ef1: ElectricForce on all domains | SpecifyForceUsing = ElectricField

Multiphysics
  epfi1: ElectricParticleFieldInteraction on all domains
    ChargeDensitySource_physics = cpt2
    ChargeDensityDestination_physics = es2

Mesh
  mesh1 "Mesh 1" (physics-controlled)

Studies
  std1 "Study 1"
    time: Transient "Time Dependent" | tlist = range(0,0.1,1)

Datasets
  wv1_ds1: Grid1D

Plots
  pg1: PlotGroup1D "1D Plot Group 1" | data = wv1_ds1; title = wv1
    plot1: LineGraph | expr = comp1.wv1(x)